// SBML level 2 version 4

model iGameModel()

  // Compartments:
  compartment Flask = 0.4;
  compartment E_coli in Flask = 1e-14;

  // Species:
  species sPecIes0 in Flask = 1e-20;  // substance in mole
  species sPecIes1 in E_coli = 1e-22/E_coli;  // substance in mole
  species mrna in E_coli = 0;
  species prot in E_coli = 0;
  species sPecIes4 in E_coli = 0;
  species sPecIes5 in E_coli = 0;
  species sPecIes6 in E_coli = 0;

  // Reactions:
  amplification_of_Ecoli: => sPecIes0; amplification_of_Ecoli_kgrowth*(1 - sPecIes0/maxc)*sPecIes0*Flask;
    amplification_of_Ecoli_kgrowth = 0.0005766 per_second; maxc = 1.66e-12 per_second;
  amplification_of_tm_pSB1A3: => sPecIes1; amplification_of_tm_pSB1A3_kgrowth*sPecIes1*E_coli;
    amplification_of_tm_pSB1A3_kgrowth = 1 per_second;
  rEactIon2: => mrna; rEactIon2_k_tc*sPecIes1*E_coli; rEactIon2 is "transcription";  // modifiers: sPecIes1
    rEactIon2_k_tc = 0.5 per_second;
  translation: => prot; k_tl*mrna*E_coli;  // modifiers: mrna
    k_tl = 6.93 per_second;
  rEactIon4: prot + prot -> sPecIes4; rEactIon4_kon*prot*prot*E_coli; rEactIon4 is "dimerization lacI";
    rEactIon4_kon = 1000000000 litre_per_mole_per_second;
  rEactIon5: sPecIes4 + sPecIes4 -> sPecIes5; rEactIon5_kon*sPecIes4*sPecIes4*E_coli; rEactIon5 is "dimerization lacI2";
    rEactIon5_kon = 1000000000 litre_per_mole_per_second;
  rEactIon6: sPecIes4 + sPecIes4 -> sPecIes5; rEactIon6_kon*sPecIes4*sPecIes4*E_coli; rEactIon6 is "dimerization lacI2";
    rEactIon6_kon = 1000000000 litre_per_mole_per_second;
  rEactIon7: sPecIes4 + sPecIes4 -> sPecIes5; rEactIon7_kon*sPecIes4*sPecIes4*E_coli; rEactIon7 is "dimerization lacI2";
    rEactIon7_kon = 1000000000 litre_per_mole_per_second;
  rEactIon8: sPecIes4 + sPecIes4 -> sPecIes5; rEactIon8_kon*sPecIes4*sPecIes4*E_coli; rEactIon8 is "dimerization lacI2";
    rEactIon8_kon = 1000000000 litre_per_mole_per_second;
  rEactIon9: sPecIes4 -> prot + prot; rEactIon9_koff*sPecIes4*E_coli; rEactIon9 is "dimerization lacI";
    rEactIon9_koff = 10 per_second;
  rEactIon10: sPecIes4 -> prot + prot; rEactIon10_koff*sPecIes4*E_coli; rEactIon10 is "dimerization lacI";
    rEactIon10_koff = 10 per_second;
  rEactIon11: sPecIes5 -> sPecIes4 + sPecIes4; rEactIon11_koff*sPecIes5*E_coli; rEactIon11 is "dimerization lacI2";
    rEactIon11_koff = 10 per_second;
  rEactIon12: sPecIes5 -> sPecIes4 + sPecIes4; rEactIon12_koff*sPecIes5*E_coli; rEactIon12 is "dimerization lacI2";
    rEactIon12_koff = 10 per_second;
  rEactIon13: sPecIes5 -> sPecIes4 + sPecIes4; rEactIon13_koff*sPecIes5*E_coli; rEactIon13 is "dimerization lacI2";
    rEactIon13_koff = 10 per_second;
  rEactIon14: sPecIes5 -> sPecIes4 + sPecIes4; rEactIon14_koff*sPecIes5*E_coli; rEactIon14 is "dimerization lacI2";
    rEactIon14_koff = 10 per_second;
  rEactIon15: sPecIes5 -> sPecIes4 + sPecIes4; rEactIon15_koff*sPecIes5*E_coli; rEactIon15 is "dimerization lacI2";
    rEactIon15_koff = 10 per_second;
  rEactIon16: sPecIes5 -> sPecIes4 + sPecIes4; rEactIon16_koff*sPecIes5*E_coli; rEactIon16 is "dimerization lacI2";
    rEactIon16_koff = 10 per_second;
  rEactIon17: sPecIes5 -> sPecIes4 + sPecIes4; rEactIon17_koff*sPecIes5*E_coli; rEactIon17 is "dimerization lacI2";
    rEactIon17_koff = 10 per_second;
  rEactIon18: sPecIes5 -> sPecIes4 + sPecIes4; rEactIon18_koff*sPecIes5*E_coli; rEactIon18 is "dimerization lacI2";
    rEactIon18_koff = 10 per_second;
  rEactIon19: sPecIes1 + sPecIes5 -> sPecIes6; rEactIon19_kon*sPecIes1*sPecIes5*E_coli; rEactIon19 is "binding placI:lacI4";
    rEactIon19_kon = 2000000000 litre_per_mole_per_second;
  rEactIon20: sPecIes1 + sPecIes5 -> sPecIes6; rEactIon20_kon*sPecIes1*sPecIes5*E_coli; rEactIon20 is "binding placI:lacI4";
    rEactIon20_kon = 2000000000 litre_per_mole_per_second;
  rEactIon21: sPecIes1 + sPecIes5 -> sPecIes6; rEactIon21_kon*sPecIes1*sPecIes5*E_coli; rEactIon21 is "binding placI:lacI4";
    rEactIon21_kon = 2000000000 litre_per_mole_per_second;
  rEactIon22: sPecIes1 + sPecIes5 -> sPecIes6; rEactIon22_kon*sPecIes1*sPecIes5*E_coli; rEactIon22 is "binding placI:lacI4";
    rEactIon22_kon = 2000000000 litre_per_mole_per_second;
  rEactIon23: sPecIes1 + sPecIes5 -> sPecIes6; rEactIon23_kon*sPecIes1*sPecIes5*E_coli; rEactIon23 is "binding placI:lacI4";
    rEactIon23_kon = 2000000000 litre_per_mole_per_second;
  rEactIon24: sPecIes1 + sPecIes5 -> sPecIes6; rEactIon24_kon*sPecIes1*sPecIes5*E_coli; rEactIon24 is "binding placI:lacI4";
    rEactIon24_kon = 2000000000 litre_per_mole_per_second;
  rEactIon25: sPecIes1 + sPecIes5 -> sPecIes6; rEactIon25_kon*sPecIes1*sPecIes5*E_coli; rEactIon25 is "binding placI:lacI4";
    rEactIon25_kon = 2000000000 litre_per_mole_per_second;
  rEactIon26: sPecIes1 + sPecIes5 -> sPecIes6; rEactIon26_kon*sPecIes1*sPecIes5*E_coli; rEactIon26 is "binding placI:lacI4";
    rEactIon26_kon = 2000000000 litre_per_mole_per_second;
  rEactIon27: sPecIes6 -> sPecIes1 + sPecIes5; rEactIon27_koff*sPecIes6*E_coli; rEactIon27 is "binding placI:lacI4";
    rEactIon27_koff = 0.04 per_second;
  rEactIon28: sPecIes6 -> sPecIes1 + sPecIes5; rEactIon28_koff*sPecIes6*E_coli; rEactIon28 is "binding placI:lacI4";
    rEactIon28_koff = 0.04 per_second;
  rEactIon29: sPecIes6 -> sPecIes1 + sPecIes5; rEactIon29_koff*sPecIes6*E_coli; rEactIon29 is "binding placI:lacI4";
    rEactIon29_koff = 0.04 per_second;
  rEactIon30: sPecIes6 -> sPecIes1 + sPecIes5; rEactIon30_koff*sPecIes6*E_coli; rEactIon30 is "binding placI:lacI4";
    rEactIon30_koff = 0.04 per_second;
  rEactIon31: sPecIes6 -> sPecIes1 + sPecIes5; rEactIon31_koff*sPecIes6*E_coli; rEactIon31 is "binding placI:lacI4";
    rEactIon31_koff = 0.04 per_second;
  rEactIon32: sPecIes6 -> sPecIes1 + sPecIes5; rEactIon32_koff*sPecIes6*E_coli; rEactIon32 is "binding placI:lacI4";
    rEactIon32_koff = 0.04 per_second;
  rEactIon33: sPecIes6 -> sPecIes1 + sPecIes5; rEactIon33_koff*sPecIes6*E_coli; rEactIon33 is "binding placI:lacI4";
    rEactIon33_koff = 0.04 per_second;
  rEactIon34: sPecIes6 -> sPecIes1 + sPecIes5; rEactIon34_koff*sPecIes6*E_coli; rEactIon34 is "binding placI:lacI4";
    rEactIon34_koff = 0.04 per_second;
  rEactIon35: => mrna; rEactIon35_k_tc*sPecIes6*E_coli; rEactIon35 is "transcription";  // modifiers: sPecIes6
    rEactIon35_k_tc = 0.0005 per_second;

  // Unit definitions:
  unit per_second = 1 / second;
  unit mole_per_litre = mole / litre;
  unit litre_per_mole_per_second = litre / (mole * second);
end
