// SBML level 2 version 4

function gaussian(S, t, t0, sigma)
  S/sigma/sqrt(pi)*exp((-((t - t0)/sigma))^2);
end

model iGameModel()

  // Compartments:
  compartment Flask = 0.4;
  compartment E_coli in Flask = 1e-14;

  // Species:
  species sPecIes0 in Flask = 1e-20;
  species $sPecIes1 in Flask = 0;
  species sPecIes2 in E_coli = 1e-22/E_coli;
  species sPecIes3 in E_coli = 0;
  species mrna in E_coli = 0;
  species prot in E_coli = 0;
  species sPecIes6 in E_coli = 0;
  species sPecIes7 in E_coli = 0;
  species sPecIes8 in E_coli = 0;
  species sPecIes9 in E_coli = 0;

  // Parameters:
  amount = 1 mole;
  t0 = 1 second;
  Avogadro = 6.022e23 item_per_mole;
  sigma = 1 second;
  t has second;

  // Assignment rules:
  t := time;

  // Rate rules:
  sPecIes1' = gaussian(amount, t, t0, sigma);

  // Reactions:
  amplification_of_Ecoli: => sPecIes0; amplification_of_Ecoli_kgrowth*(1 - sPecIes0/amplification_of_Ecoli_maxc)*sPecIes0*Flask;
    amplification_of_Ecoli_kgrowth = 0.0005766 per_second; amplification_of_Ecoli_maxc = 1.66e-12 per_second;
  rEactIon1: $sPecIes1 -> sPecIes3; rEactIon1_k_trans*sPecIes1*Flask; rEactIon1 is "trans_IPTG";
    rEactIon1_k_trans = 0.8 per_second;
  rEactIon2: => sPecIes2; rEactIon2_kgrowth*sPecIes2*E_coli; rEactIon2 is "amplification of tm_pSB1A3";
    rEactIon2_kgrowth = 1 per_second;
  rEactIon3: => sPecIes2; -1*rEactIon3_ksup*(sPecIes2/rEactIon3_copynum)*sPecIes2*E_coli*E_coli*Avogadro; rEactIon3 is "suppression of tm_pSB1A3";
    rEactIon3_ksup = 0.1 per_second; rEactIon3_copynum = 200 item;
  rEactIon4: sPecIes2 => ; rEactIon4_kgrowth*(1 - sPecIes0/rEactIon4_maxc)*sPecIes2*E_coli; rEactIon4 is "template dilution in E_coli";  // modifiers: sPecIes0
    rEactIon4_kgrowth = 0.0005766 per_second; rEactIon4_maxc = 1.66e-12 per_second;
  rEactIon5: => mrna; rEactIon5_k_tc*sPecIes2*E_coli; rEactIon5 is "transcription";  // modifiers: sPecIes2
    rEactIon5_k_tc = 0.5 per_second;
  rEactIon6: sPecIes3 -> $sPecIes1; rEactIon6_k_trans*sPecIes3*E_coli; rEactIon6 is "trans_IPTG";
    rEactIon6_k_trans = 0.8 per_second;
  rEactIon7: sPecIes3 => ; rEactIon7_kgrowth*(1 - sPecIes0/rEactIon7_maxc)*sPecIes3*E_coli; rEactIon7 is "template dilution in E_coli";  // modifiers: sPecIes0
    rEactIon7_kgrowth = 0.0005766 per_second; rEactIon7_maxc = 1.66e-12 per_second;
  translation: => prot; k_tl*mrna*E_coli;  // modifiers: mrna
    k_tl = 6.93 per_second;
  rEactIon9: mrna => ; rEactIon9_kdeg*mrna*E_coli; rEactIon9 is "template rna degradation in E_coli";
    rEactIon9_kdeg = 0.001 per_second;
  rEactIon10: mrna => ; rEactIon10_kgrowth*(1 - sPecIes0/rEactIon10_maxc)*mrna*E_coli; rEactIon10 is "template dilution in E_coli";  // modifiers: sPecIes0
    rEactIon10_kgrowth = 0.0005766 per_second; rEactIon10_maxc = 1.66e-12 per_second;
  rEactIon11: prot + prot -> sPecIes6; rEactIon11_kon*prot*prot*E_coli; rEactIon11 is "dimerization lacI";
    rEactIon11_kon = 1000000000 litre_per_mole_per_second;
  rEactIon12: prot => ; rEactIon12_kdeg*prot*E_coli; rEactIon12 is "template protein degradation in E_coli";
    rEactIon12_kdeg = 0.001 per_second;
  rEactIon13: prot => ; rEactIon13_kgrowth*(1 - sPecIes0/rEactIon13_maxc)*prot*E_coli; rEactIon13 is "template dilution in E_coli";  // modifiers: sPecIes0
    rEactIon13_kgrowth = 0.0005766 per_second; rEactIon13_maxc = 1.66e-12 per_second;
  rEactIon14: sPecIes6 + sPecIes6 -> sPecIes7; rEactIon14_kon*sPecIes6*sPecIes6*E_coli; rEactIon14 is "dimerization lacI2";
    rEactIon14_kon = 1000000000 litre_per_mole_per_second;
  rEactIon15: sPecIes6 -> prot + prot; rEactIon15_koff*sPecIes6*E_coli; rEactIon15 is "dimerization lacI";
    rEactIon15_koff = 10 per_second;
  rEactIon16: sPecIes6 => ; rEactIon16_kgrowth*(1 - sPecIes0/rEactIon16_maxc)*sPecIes6*E_coli; rEactIon16 is "template dilution in E_coli";  // modifiers: sPecIes0
    rEactIon16_kgrowth = 0.0005766 per_second; rEactIon16_maxc = 1.66e-12 per_second;
  rEactIon17: sPecIes7 -> sPecIes6 + sPecIes6; rEactIon17_koff*sPecIes7*E_coli; rEactIon17 is "dimerization lacI2";
    rEactIon17_koff = 10 per_second;
  rEactIon18: sPecIes2 + sPecIes7 -> sPecIes8; rEactIon18_kon*sPecIes2*sPecIes7*E_coli; rEactIon18 is "binding placI:lacI4";
    rEactIon18_kon = 2000000000 litre_per_mole_per_second;
  rEactIon19: sPecIes3 + sPecIes7 -> sPecIes9; rEactIon19_kon*sPecIes3*sPecIes7*E_coli; rEactIon19 is "binding IPTG:lacI4";
    rEactIon19_kon = 46000 litre_per_mole_per_second;
  rEactIon20: sPecIes7 => ; rEactIon20_kgrowth*(1 - sPecIes0/rEactIon20_maxc)*sPecIes7*E_coli; rEactIon20 is "template dilution in E_coli";  // modifiers: sPecIes0
    rEactIon20_kgrowth = 0.0005766 per_second; rEactIon20_maxc = 1.66e-12 per_second;
  rEactIon21: sPecIes8 -> sPecIes2 + sPecIes7; rEactIon21_koff*sPecIes8*E_coli; rEactIon21 is "binding placI:lacI4";
    rEactIon21_koff = 0.04 per_second;
  rEactIon22: sPecIes8 => ; rEactIon22_kgrowth*(1 - sPecIes0/rEactIon22_maxc)*sPecIes8*E_coli; rEactIon22 is "template dilution in E_coli";  // modifiers: sPecIes0
    rEactIon22_kgrowth = 0.0005766 per_second; rEactIon22_maxc = 1.66e-12 per_second;
  rEactIon23: => sPecIes2; rEactIon23_kgrowth*sPecIes8*E_coli; rEactIon23 is "amplification of tm_pSB1A3";  // modifiers: sPecIes8
    rEactIon23_kgrowth = 1 per_second;
  rEactIon24: => sPecIes2; -1*rEactIon24_ksup*(sPecIes8/rEactIon24_copynum)*sPecIes2*E_coli*E_coli*Avogadro; rEactIon24 is "suppression of tm_pSB1A3";  // modifiers: sPecIes8
    rEactIon24_ksup = 0.1 per_second; rEactIon24_copynum = 200 item;
  rEactIon25: => sPecIes2; -1*rEactIon25_ksup*(sPecIes2/rEactIon25_copynum)*sPecIes8*E_coli*E_coli*Avogadro; rEactIon25 is "suppression of tm_pSB1A3";  // modifiers: sPecIes8
    rEactIon25_ksup = 0.1 per_second; rEactIon25_copynum = 200 item;
  rEactIon26: => sPecIes2; -1*rEactIon26_ksup*(sPecIes8/rEactIon26_copynum)*sPecIes8*E_coli*E_coli*Avogadro; rEactIon26 is "suppression of tm_pSB1A3";  // modifiers: sPecIes8
    rEactIon26_ksup = 0.1 per_second; rEactIon26_copynum = 200 item;
  rEactIon27: => mrna; rEactIon27_k_tc*sPecIes8*E_coli; rEactIon27 is "transcription";  // modifiers: sPecIes8
    rEactIon27_k_tc = 0.0005 per_second;
  rEactIon28: sPecIes9 -> sPecIes3 + sPecIes7; rEactIon28_koff*sPecIes9*E_coli; rEactIon28 is "binding IPTG:lacI4";
    rEactIon28_koff = 0.2 per_second;
  rEactIon29: sPecIes9 => ; rEactIon29_kgrowth*(1 - sPecIes0/rEactIon29_maxc)*sPecIes9*E_coli; rEactIon29 is "template dilution in E_coli";  // modifiers: sPecIes0
    rEactIon29_kgrowth = 0.0005766 per_second; rEactIon29_maxc = 1.66e-12 per_second;

  // Unit definitions:
  unit per_second = 1 / second;
  unit mole_per_litre = mole / litre;
  unit litre_per_mole_per_second = litre / (mole * second);
  unit item_per_mole = item / mole;
end
