// SBML level 2 version 1

model Tyson1991CellModel_6()
  // Tyson1991_CellCycle_6var
  // This model is automatically converted from the Model BIOMD0000000005 by using libsbml. According to the terms of use, this generated model is not related with Model BIOMD0000000005 any more.
  // There is following warning during the conversion:
  // SBML Level 2 Version 4 removed the requirement that all units be consistent. This model contains units that produce inconsistencies and thus conversion to Level 2 Version 1 would produce an invalid model.
  // biomodels.db:BIOMD0000000005
  // biomodels.db:MODEL6614644188
  // isDescribedBy pubmed:1831270
  // hasVersion reactome:REACT_152
  // isVersionOf kegg.pathway:sce04111 GO:0000278
  // occursIn taxonomy:33154

  // Compartments:
  compartment cell = 1;  // GO:0005623

  // Species:
  species $EmptySet in cell = 0;
  species cdc2k in cell = 0;  // isVersionOf uniprot:P04551
  species CP in cell = 0.75/cell; CP is "cdc2k-P";  // isVersionOf uniprot:P04551
  species M in cell = 0; M is "p-cyclin_cdc2";  // hasPart uniprot:P04551 interpro:IPR006670
  species pM in cell = 0.25/cell; pM is "p-cyclin_cdc2-p";  // hasPart uniprot:P04551 interpro:IPR006670
  species Y in cell = 0; Y is "cyclin";  // isVersionOf interpro:IPR006670
  species YP in cell = 0; YP is "p-cyclin";  // isVersionOf interpro:IPR006670
  species $YT in cell; YT is "total_cyclin";  // isVersionOf interpro:IPR006670
  species $CT in cell; CT is "total_cdc2";  // isVersionOf uniprot:P04551

  // Assignment rules:
  YT := Y + YP + M + pM;
  CT := cdc2k + CP + M + pM;

  // Reactions:
  cyclin_cdc2k_dissociation: M => cdc2k + YP; cell*k6*M;  // isVersionOf GO:0000079; hasVersion reactome:REACT_6308
    k6 = 1;
  cdc2k_phosphorylation: cdc2k => CP; cell*cdc2k*k8notP;  // isVersionOf ec-code:2.7.11.1 GO:0006468
    k8notP = 1000000;
  cdc2k_dephosphorylation: CP => cdc2k; cell*CP*k9;  // isVersionOf ec-code:3.1.3.16 GO:0006470
    k9 = 1000;
  cyclin_cdc2k_p_association: CP + Y => pM; cell*CP*k3*Y; cyclin_cdc2k_p_association is "cyclin cdc2k-p association";  // hasVersion reactome:REACT_6308 reactome:REACT_6216
    k3 = 200;
  deactivation_of_cdc2_kinase: M => pM; cell*k5notP*M;  // hasVersion reactome:REACT_6327 reactome:REACT_3178; isVersionOf ec-code:2.7.10.2 GO:0045736 GO:0006468
    k5notP = 0;
  cyclin_biosynthesis: $EmptySet => Y; cell*k1aa;  // isVersionOf GO:0006412
    k1aa = 0.015;
  default_degradation_of_cyclin: Y => $EmptySet; cell*k2*Y;  // isVersionOf GO:0008054
    k2 = 0;
  Reaction8: YP => $EmptySet; cell*k7*YP; Reaction8 is "cdc2 kinase triggered degration of cyclin";  // isVersionOf GO:0008054
    k7 = 0.6;
  activation_of_cdc2_kinase: pM => M; cell*pM*(k4prime + k4*(M/CT)^2);  // modifiers: CT; hasVersion reactome:REACT_6257 reactome:REACT_6175 reactome:REACT_6294; isVersionOf ec-code:3.1.3.16 GO:0006470 GO:0045737
    k4 = 180; k4prime = 0.018;
end
